<?xml version="1.0"?>
<?xml-stylesheet type="text/xsl" href="http://jsbsim.sourceforge.net/JSBSim.xsl"?>
<fdm_config xmlns:xsi="http://www.w3.org/2001/XMLSchema-instance" name="Lockheed Martin F-35B" version="2.0" release="TRIAL" xsi:noNamespaceSchemaLocation="http://jsbsim.sourceforge.net/JSBSim.xsd">
  <fileheader>
    <author> James Goppert</author>
    <filecreationdate> 2021-3-30 </filecreationdate>
    <version> 1.0 </version>
    <license>
      <licenseName>GPL (General Public License)</licenseName>
      <licenseURL>http://www.gnu.org/licenses/gpl.html</licenseURL>
    </license>
    <description> Models a F-35B. </description>
  </fileheader>
  <metrics>
    <wingarea unit="FT2">  237.34 </wingarea>
    <wingspan unit="FT">   45.67 </wingspan>
    <wing_incidence>          0.00 </wing_incidence>
    <chord unit="FT">   5.67 </chord>
    <htailarea unit="FT2">   103.3 </htailarea>
    <htailarm unit="FT">   22.2 </htailarm>
    <vtailarea unit="FT2">   53.28 </vtailarea>
    <vtailarm unit="FT">   16.88 </vtailarm>
    <location name="AERORP" unit="IN">
      <x> 346.45 </x>
      <y>   0.00 </y>
      <z>   59.00 </z>
    </location>
    <location name="EYEPOINT" unit="IN">
      <x> 122.84 </x>
      <y>   0.00 </y>
      <z>  36.00 </z>
    </location>
    <location name="VRP" unit="IN">
      <x>0</x>
      <y>0</y>
      <z>20</z>
    </location>
  </metrics>
  <mass_balance>
    <ixx unit="SLUG*FT2">     18449 </ixx>
    <iyy unit="SLUG*FT2">     24324 </iyy>
    <izz unit="SLUG*FT2">     38124 </izz>
    <emptywt unit="LBS">     9039 </emptywt>
    <location name="CG" unit="IN">
      <x> 275.16 </x>
      <y>   0.00 </y>
      <z> 27.6 </z>
    </location>
  </mass_balance>
  <ground_reactions>
    <contact type="BOGEY" name="NOSE">
      <location unit="IN">
        <x>  86.6 </x>
        <y>   0.00 </y>
        <z> -23.6 </z>
      </location>
      <static_friction>  0.80 </static_friction>
      <dynamic_friction> 0.50 </dynamic_friction>
      <rolling_friction> 0.02 </rolling_friction>
      <spring_coeff unit="LBS/FT">      10000.00 </spring_coeff>
      <damping_coeff unit="LBS/FT/SEC">  2000.00 </damping_coeff>
      <max_steer unit="DEG"> 45.00 </max_steer>
      <brake_group>NONE</brake_group>
      <retractable>1</retractable>
    </contact>
    <contact type="BOGEY" name="LEFT_MAIN">
      <location unit="IN">
        <x> 346.5 </x>
        <y> -71.5 </y>
        <z> -23.6 </z>
      </location>
      <static_friction>  0.80 </static_friction>
      <dynamic_friction> 0.50 </dynamic_friction>
      <rolling_friction> 0.02 </rolling_friction>
      <spring_coeff unit="LBS/FT">      30000.00 </spring_coeff>
      <damping_coeff unit="LBS/FT/SEC"> 6000.00 </damping_coeff>
      <max_steer unit="DEG">0</max_steer>
      <brake_group>LEFT</brake_group>
      <retractable>1</retractable>
    </contact>
    <contact type="BOGEY" name="RIGHT_MAIN">
      <location unit="IN">
        <x> 346.5 </x>
        <y>  71.5 </y>
        <z> -23.6 </z>
      </location>
      <static_friction>  0.80 </static_friction>
      <dynamic_friction> 0.50 </dynamic_friction>
      <rolling_friction> 0.02 </rolling_friction>
      <spring_coeff unit="LBS/FT">      30000.00 </spring_coeff>
      <damping_coeff unit="LBS/FT/SEC"> 6000.00 </damping_coeff>
      <max_steer unit="DEG">0</max_steer>
      <brake_group>RIGHT</brake_group>
      <retractable>1</retractable>
    </contact>
    <contact type="STRUCTURE" name="LEFT_WING">
      <location unit="IN">
        <x> 278.07 </x>
        <y> -274.015 </y>
        <z> 56.259 </z>
      </location>
      <static_friction>  0.80 </static_friction>
      <dynamic_friction> 0.50 </dynamic_friction>
      <spring_coeff unit="LBS/FT">      59535.00 </spring_coeff>
      <damping_coeff unit="LBS/FT/SEC"> 11907.00 </damping_coeff>
    </contact>
    <contact type="STRUCTURE" name="RIGHT_WING">
      <location unit="IN">
        <x> 278.07 </x>
        <y>  274.015 </y>
        <z> 56.259 </z>
      </location>
      <static_friction>  0.80 </static_friction>
      <dynamic_friction> 0.50 </dynamic_friction>
      <spring_coeff unit="LBS/FT">      59535.00 </spring_coeff>
      <damping_coeff unit="LBS/FT/SEC"> 11907.00 </damping_coeff>
    </contact>
  </ground_reactions>

  <flight_control>

    <function name="fcs/engine-roll-mix">
        <table>
            <independentVar>velocities/vt-fps</independentVar>
            <tableData>
                0   0.1
                100  0.1
                200 0
                300 0
            </tableData>
        </table>
    </function>

    <function name="fcs/engine-pitch-mix">
        <table>
            <independentVar>velocities/vt-fps</independentVar>
            <tableData>
                0   0.1
                100  0.1
                200 0
                300 0
            </tableData>
        </table>
    </function>

    <function name="fcs/aero-moment-mix">
        <table>
            <independentVar>velocities/vt-fps</independentVar>
            <tableData>
                0   0
                100  0
                200 1
                300 1
            </tableData>
        </table>
    </function>

    <function name="fcs/engine-yaw-mix">
        <table>
            <independentVar>velocities/vt-fps</independentVar>
            <tableData>
                0   0.1
                100  0.1
                200 0
                300 0
            </tableData>
        </table>
    </function>

    <function name="fcs/lift-fan-thrust-mix">
        <table>
            <independentVar>velocities/vt-fps</independentVar>
            <tableData>
                0   0.9
                100  0.9
                200 0.0
                300 0.0
            </tableData>
        </table>
    </function>

    <function name="fcs/engine-thrust-mix">
        <table>
            <independentVar>velocities/vt-fps</independentVar>
            <tableData>
                0   0.9
                100  0.9
                200 1.0
                300 1.0
            </tableData>
        </table>
    </function>

    <channel name="Gear">
      <pure_gain>
        <input>gear/gear-cmd-norm</input>
        <gain>1</gain>
        <output>gear/gear-pos-norm</output>
      </pure_gain>
    </channel>

    <channel name="Elevator">
      <pure_gain>
        <input>fcs/elevator-cmd-norm</input>
        <gain>fcs/aero-moment-mix</gain>
        <output>fcs/elevator-pos-rad</output>
      </pure_gain>
    </channel>

    <channel name="Left Aileron">
      <pure_gain>
        <input>fcs/aileron-cmd-norm</input>
        <gain>-fcs/aero-moment-mix</gain>
        <output>fcs/left-aileron-pos-rad</output>
      </pure_gain>
    </channel>

    <channel name="Right Aileron">
      <pure_gain>
        <input>fcs/aileron-cmd-norm</input>
        <gain>fcs/aero-moment-mix</gain>
        <output>fcs/right-aileron-pos-rad</output>
      </pure_gain>
    </channel>

    <channel name="Rudder">
      <pure_gain>
        <input>fcs/rudder-cmd-norm</input>
        <gain>fcs/aero-moment-mix</gain>
        <output>fcs/rudder-pos-rad</output>
      </pure_gain>
    </channel>


    <channel name="Engine0">
      <pure_gain name="fcs/elevator_to_engine0">
        <input>fcs/elevator-cmd-norm</input>
        <gain>fcs/engine-pitch-mix</gain>
      </pure_gain>
      <pure_gain name="fcs/throttle_to_engine0">
        <input>fcs/throttle-cmd-norm</input>
        <gain>fcs/engine-thrust-mix</gain>
      </pure_gain>
      <summer>
        <input>fcs/elevator_to_engine0</input>
        <input>fcs/throttle_to_engine0</input>
        <output>fcs/throttle-pos-norm</output>
      </summer>
    </channel>

    <channel name="Engine0_Yaw">
      <pure_gain name="fcs/rudder_to_engine0_yaw">
        <input>fcs/rudder-cmd-norm</input>
        <gain>fcs/engine-yaw-mix</gain>
        <output>propulsion/engine/yaw-angle-rad</output>
      </pure_gain>
    </channel>

    <channel name="Engine1">
      <pure_gain name="fcs/elevator_to_engine1">
        <input>fcs/elevator-cmd-norm</input>
        <gain>-fcs/engine-pitch-mix</gain>
      </pure_gain>
      <pure_gain name="fcs/throttle_to_engine1">
        <input>fcs/throttle-cmd-norm</input>
        <gain>fcs/lift-fan-thrust-mix</gain>
      </pure_gain>
      <summer>
        <input>fcs/elevator_to_engine1</input>
        <input>fcs/throttle_to_engine1</input>
        <output>fcs/throttle-pos-norm[1]</output>
      </summer>
    </channel>

    <channel name="Engine2">
      <pure_gain name="fcs/aileron_to_engine2">
        <input>fcs/aileron-cmd-norm</input>
        <gain>fcs/engine-roll-mix</gain>
      </pure_gain>
      <pure_gain name="fcs/throttle_to_engine2">
        <input>fcs/throttle-cmd-norm</input>
        <gain>fcs/lift-fan-thrust-mix</gain>
      </pure_gain>
      <summer>
        <input>fcs/aileron_to_engine2</input>
        <input>fcs/throttle_to_engine2</input>
        <output>fcs/throttle-pos-norm[2]</output>
      </summer>
    </channel>

    <channel name="Engine3">
      <pure_gain name="fcs/aileron_to_engine3">
        <input>fcs/aileron-cmd-norm</input>
        <gain>-fcs/engine-roll-mix</gain>
      </pure_gain>
      <pure_gain name="fcs/throttle_to_engine3">
        <input>fcs/throttle-cmd-norm</input>
        <gain>fcs/lift-fan-thrust-mix</gain>
      </pure_gain>
      <summer>
        <input>fcs/aileron_to_engine3</input>
        <input>fcs/throttle_to_engine3</input>
        <output>fcs/throttle-pos-norm[3]</output>
      </summer>
    </channel>


  </flight_control>

  <propulsion>
    <engine file="F135-PW-600">
      <location unit="FT">
        <x>  17.5 </x>
        <y>   11.48 </y>
        <z>   0.254 </z>
      </location>
      <feed>0</feed>
      <thruster file="direct">
        <location unit="FT">
          <x>  17.5 </x>
          <y>   11.48 </y>
          <z>   0.254 </z>
        </location>
      </thruster>
    </engine>
    <engine file="F135-PW-600">
      <location unit="FT">
        <x>  30.66 </x>
        <y>   11.48 </y>
        <z>   0.254 </z>
      </location>
      <feed>0</feed>
      <thruster file="direct">
        <location unit="FT">
          <x>  30.66 </x>
          <y>   11.48 </y>
          <z>   0.254 </z>
        </location>
      </thruster>
    </engine>
    <engine file="F135-PW-600">
      <location unit="FT">
        <x>  17.5 </x>
        <y>   6.56 </y>
        <z>   0.254 </z>
      </location>
      <feed>0</feed>
      <thruster file="direct">
        <location unit="FT">
          <x>  17.5 </x>
          <y>   6.56 </y>
          <z>   0.254 </z>
        </location>
      </thruster>
    </engine>
        <engine file="F135-PW-600">
      <location unit="FT">
        <x>  30.66 </x>
        <y>   6.56 </y>
        <z>   0.254 </z>
      </location>
      <feed>0</feed>
      <thruster file="direct">
        <location unit="FT">
          <x>  30.66 </x>
          <y>   6.56 </y>
          <z>   0.254 </z>
        </location>
      </thruster>
    </engine>

    <engine file="F135-PW-600">
      <location unit="FT">
        <x>  17.5 </x>
        <y>   -11.48 </y>
        <z>   0.254 </z>
      </location>
      <feed>0</feed>
      <thruster file="direct">
        <location unit="FT">
          <x>  17.5 </x>
          <y>   -11.48 </y>
          <z>   0.254 </z>
        </location>
      </thruster>
    </engine>
    <engine file="F135-PW-600">
      <location unit="FT">
        <x>  30.66 </x>
        <y>   -11.48 </y>
        <z>   0.254 </z>
      </location>
      <feed>0</feed>
      <thruster file="direct">
        <location unit="FT">
          <x>  30.66 </x>
          <y>   -11.48 </y>
          <z>   0.254 </z>
        </location>
      </thruster>
    </engine>
    <engine file="F135-PW-600">
      <location unit="FT">
        <x>  17.5 </x>
        <y>   -6.56 </y>
        <z>   0.254 </z>
      </location>
      <feed>0</feed>
      <thruster file="direct">
        <location unit="FT">
          <x>  17.5 </x>
          <y>   -6.56 </y>
          <z>   0.254 </z>
        </location>
      </thruster>
    </engine>
        <engine file="F135-PW-600">
      <location unit="FT">
        <x>  30.66 </x>
        <y>   -6.56 </y>
        <z>   0.254 </z>
      </location>
      <feed>0</feed>
      <thruster file="direct">
        <location unit="FT">
          <x>  30.66 </x>
          <y>   -6.56 </y>
          <z>   0.254 </z>
        </location>
      </thruster>
    </engine>

    <tank type="FUEL">
      <!-- Tank number 0 -->
      <location unit="FT">
        <x> 30 </x>
        <y>  0 </y>
        <z>  0 </z>
      </location>
      <capacity unit="LBS"> 6000 </capacity>
      <contents unit="LBS"> 6000 </contents>
    </tank>
        <tank type="FUEL">
      <!-- Tank number 1 -->
      <location unit="FT">
        <x> 30 </x>
        <y>  0 </y>
        <z>  0 </z>
      </location>
      <capacity unit="LBS"> 6000 </capacity>
      <contents unit="LBS"> 6000 </contents>
    </tank>
        <tank type="FUEL">
      <!-- Tank number 2 -->
      <location unit="FT">
        <x> 30 </x>
        <y>  0 </y>
        <z>  0 </z>
      </location>
      <capacity unit="LBS"> 6000 </capacity>
      <contents unit="LBS"> 6000 </contents>
    </tank>
  </propulsion>

  <aerodynamics>
    <axis name="LIFT">
      <function name="aero/coefficient/CLalpha">
        <description>Lift_due_to_alpha</description>
        <product>
          <property>aero/qbar-psf</property>
          <property>metrics/Sw-sqft</property>
          <table>
            <independentVar lookup="row">aero/alpha-rad</independentVar>
            <tableData>
            -0.26 -1.344
            -0.24 -1.242
            -0.23 -1.139
            -0.21 -1.036
            -0.19 -0.931
            -0.17 -0.826
            -0.16 -0.721
            -0.14 -0.615
            -0.12 -0.508
            -0.10 -0.401
            -0.09 -0.294
            -0.07 -0.186
            -0.05 -0.078
            -0.03 0.030
            -0.02 0.138
            0.00 0.245
            0.02 0.353
            0.03 0.461
            0.05 0.568
            0.07 0.675
            0.09 0.781
            0.10 0.887
            0.12 0.992
            0.14 1.097
            0.16 1.201
            0.17 1.304
            0.19 1.406
            0.21 1.507
            0.23 1.608
            0.24 1.707
            0.26 1.805
            </tableData>
          </table>
        </product>
      </function>
      <function name="aero/coefficient/dCLflap">
        <description>Delta_Lift_due_to_flaps</description>
        <product>
          <property>aero/qbar-psf</property>
          <property>metrics/Sw-sqft</property>
          <property>fcs/flap-pos-rad</property>
          <value> 0.6875 </value>
        </product>
      </function>
      <function name="aero/coefficient/dCLsb">
        <description>Delta_Lift_due_to_speedbrake</description>
        <product>
          <property>aero/qbar-psf</property>
          <property>metrics/Sw-sqft</property>
          <property>fcs/speedbrake-pos-norm</property>
          <value>0</value>
        </product>
      </function>
      <function name="aero/coefficient/CLde">
        <description>Lift_due_to_Elevator_Deflection</description>
        <product>
          <property>aero/qbar-psf</property>
          <property>metrics/Sw-sqft</property>
          <property>fcs/elevator-pos-rad</property>
          <value>0.2</value>
        </product>
      </function>
    </axis>
    <axis name="DRAG">
      <function name="aero/coefficient/CD0">
        <description>Drag_at_zero_lift</description>
        <product>
          <property>aero/qbar-psf</property>
          <property>metrics/Sw-sqft</property>
          <table>
            <independentVar lookup="row">aero/alpha-rad</independentVar>
            <tableData>
            -0.2618 0.0146
            -0.2443 0.0140
            -0.2269 0.0134
            -0.2094 0.0128
            -0.1920 0.0123
            -0.1745 0.0119
            -0.1571 0.0115
            -0.1396 0.0112
            -0.1222 0.0109
            -0.1047 0.0107
            -0.0873 0.0105
            -0.0698 0.0103
            -0.0524 0.0102
            -0.0349 0.0100
            -0.0175 0.0100
            0.0000 0.0099
            0.0175 0.0098
            0.0349 0.0097
            0.0524 0.0097
            0.0698 0.0097
            0.0873 0.0097
            0.1047 0.0096
            0.1222 0.0095
            0.1396 0.0096
            0.1571 0.0100
            0.1745 0.0105
            0.1920 0.0112
            0.2094 0.0121
            0.2269 0.0131
            0.2443 0.0143
            0.2618 0.0158
            </tableData>
          </table>
        </product>
      </function>
      <function name="aero/coefficient/CDi">
        <description>Induced_drag</description>
        <product>
          <property>aero/qbar-psf</property>
          <property>metrics/Sw-sqft</property>
          <property>aero/cl-squared</property>
          <value>0.035</value>
        </product>
      </function>
      <function name="aero/coefficient/CDmach">
        <description>Drag_due_to_mach</description>
        <product>
          <property>aero/qbar-psf</property>
          <property>metrics/Sw-sqft</property>
          <table>
            <independentVar lookup="row">velocities/mach</independentVar>
            <tableData>
                0.00      0.000
                0.81      0.000
                1.10      0.023
                1.80      0.015
            </tableData>
          </table>
        </product>
      </function>
      <function name="aero/coefficient/CDflap">
        <description>Drag_due_to_flaps</description>
        <product>
          <property>aero/qbar-psf</property>
          <property>metrics/Sw-sqft</property>
          <property>fcs/flap-pos-rad</property>
          <value> 0.15219 </value>
        </product>
      </function>
      <function name="aero/coefficient/CDgear">
        <description>Drag_due_to_gear</description>
        <product>
          <property>aero/qbar-psf</property>
          <property>metrics/Sw-sqft</property>
          <property>gear/gear-pos-norm</property>
          <value>0.02</value>
        </product>
      </function>
      <function name="aero/coefficient/CDsb">
        <description>Drag_due_to_speedbrakes</description>
        <product>
          <property>aero/qbar-psf</property>
          <property>metrics/Sw-sqft</property>
          <property>fcs/speedbrake-pos-norm</property>
          <value>0.0</value>
        </product>
      </function>
      <function name="aero/coefficient/CDbeta">
        <description>Drag_due_to_sideslip</description>
        <product>
          <property>aero/qbar-psf</property>
          <property>metrics/Sw-sqft</property>
          <table>
            <independentVar lookup="row">aero/beta-rad</independentVar>
            <tableData>
              -0.367 0.040
                -0.332 0.039
                -0.297 0.027
                -0.262 0.029
                -0.227 0.025
                -0.192 0.019
                -0.157 0.022
                -0.122 0.018
                -0.087 0.016
                -0.052 0.016
                -0.017 0.016
                0.017 0.016
                0.052 0.016
                0.087 0.016
                0.122 0.018
                0.157 0.022
                0.192 0.019
                0.227 0.025
                0.262 0.029
                0.297 0.028
                0.332 0.039
                0.349 0.045
            </tableData>
          </table>
        </product>
      </function>
      <function name="aero/coefficient/CDde">
        <description>Drag_due_to_Elevator_Deflection</description>
        <product>
          <property>aero/qbar-psf</property>
          <property>metrics/Sw-sqft</property>
          <abs>
            <property>fcs/elevator-pos-norm</property>
          </abs>
          <value>0.042017</value>
        </product>
      </function>
    </axis>
    <axis name="SIDE">
      <function name="aero/coefficient/CYb">
        <description>Side_force_due_to_beta</description>
        <product>
          <property>aero/qbar-psf</property>
          <property>metrics/Sw-sqft</property>
          <property>aero/beta-rad</property>
          <value>-0.5</value>
        </product>
      </function>
    </axis>
    <axis name="ROLL">
      <function name="aero/coefficient/Clb">
        <description>Roll_moment_due_to_beta</description>
        <product>
          <property>aero/qbar-psf</property>
          <property>metrics/Sw-sqft</property>
          <property>metrics/bw-ft</property>
          <property>aero/beta-rad</property>
          <value>-0.01</value>
        </product>
      </function>
      <function name="aero/coefficient/Clp">
        <description>Roll_moment_due_to_roll_rate</description>
        <product>
          <property>aero/qbar-psf</property>
          <property>metrics/Sw-sqft</property>
          <property>metrics/bw-ft</property>
          <property>aero/bi2vel</property>
          <property>velocities/p-aero-rad_sec</property>
          <value>-0.4</value>
        </product>
      </function>
      <function name="aero/coefficient/Clr">
        <description>Roll_moment_due_to_yaw_rate</description>
        <product>
          <property>aero/qbar-psf</property>
          <property>metrics/Sw-sqft</property>
          <property>metrics/bw-ft</property>
          <property>aero/bi2vel</property>
          <property>velocities/r-aero-rad_sec</property>
          <value>0.005</value>
        </product>
      </function>
      <function name="aero/coefficient/Clda">
        <description>Roll_moment_due_to_aileron</description>
        <product>
          <property>aero/qbar-psf</property>
          <property>metrics/Sw-sqft</property>
          <property>metrics/bw-ft</property>
          <property>fcs/left-aileron-pos-rad</property>
          <value>0.2704</value>
          <!-- to match real datas -->
          <table>
            <independentVar lookup="row">velocities/mach</independentVar>
            <tableData>
              0.0    0.110
              1.0    0.067
            </tableData>
          </table>
        </product>
      </function>
      <function name="aero/coefficient/Cldr">
        <description>Roll_moment_due_to_rudder</description>
        <product>
          <property>aero/qbar-psf</property>
          <property>metrics/Sw-sqft</property>
          <property>metrics/bw-ft</property>
          <property>fcs/rudder-pos-rad</property>
          <value>0.005</value>
        </product>
      </function>
    </axis>
    <axis name="PITCH">
      <function name="aero/coefficient/Cmalpha">
        <description>Pitch_moment_due_to_alpha</description>
        <sum>
          <value>0.1</value> <!-- Cm0 -->
          <product>
            <property>aero/qbar-psf</property>
            <property>metrics/Sw-sqft</property>
            <property>metrics/cbarw-ft</property>
            <property>aero/alpha-rad</property>
            <value>-4.0</value>
          </product>
        </sum>
      </function>
      <function name="aero/coefficient/Cmde">
        <description>Pitch_moment_due_to_elevator</description>
        <product>
          <property>aero/qbar-psf</property>
          <property>metrics/Sw-sqft</property>
          <property>metrics/cbarw-ft</property>
          <property>fcs/elevator-pos-rad</property>
            <value>-1.5</value>
        </product>
      </function>
      <function name="aero/coefficient/Cmq">
        <description>Pitch_moment_due_to_pitch_rate</description>
        <product>
          <property>aero/qbar-psf</property>
          <property>metrics/Sw-sqft</property>
          <property>metrics/cbarw-ft</property>
          <property>aero/ci2vel</property>
          <property>velocities/q-aero-rad_sec</property>
          <value>-10</value>
        </product>
      </function>
      <function name="aero/coefficient/Cmadot">
        <description>Pitch_moment_due_to_alpha_rate</description>
        <product>
          <property>aero/qbar-psf</property>
          <property>metrics/Sw-sqft</property>
          <property>metrics/cbarw-ft</property>
          <property>aero/ci2vel</property>
          <property>aero/alphadot-rad_sec</property>
          <value>-12</value>
        </product>
      </function>
    </axis>
    <axis name="YAW">
      <function name="aero/coefficient/Cnb">
        <description>Yaw_moment_due_to_beta</description>
        <product>
          <property>aero/qbar-psf</property>
          <property>metrics/Sw-sqft</property>
          <property>metrics/bw-ft</property>
          <property>aero/beta-rad</property>
          <value>0.2</value>
        </product>
      </function>
      <function name="aero/coefficient/Cnr">
        <description>Yaw_moment_due_to_yaw_rate</description>
        <product>
          <property>aero/qbar-psf</property>
          <property>metrics/Sw-sqft</property>
          <property>metrics/bw-ft</property>
          <property>aero/bi2vel</property>
          <property>velocities/r-aero-rad_sec</property>
          <value>-0.04</value>
        </product>
      </function>
      <function name="aero/coefficient/Cndr">
        <description>Yaw_moment_due_to_rudder</description>
        <product>
          <property>aero/qbar-psf</property>
          <property>metrics/Sw-sqft</property>
          <property>metrics/bw-ft</property>
          <property>fcs/rudder-pos-rad</property>
          <value>-0.5</value>
        </product>
      </function>
      <function name="aero/coefficient/Cnda">
        <description>Adverse_yaw</description>
        <product>
          <property>aero/qbar-psf</property>
          <property>metrics/Sw-sqft</property>
          <property>metrics/bw-ft</property>
          <property>fcs/left-aileron-pos-rad</property>
          <value>0</value>
        </product>
      </function>
    </axis>
  </aerodynamics>
</fdm_config>
